// SBML level 3 version 1

function my_hill(x)
  x/(1 + x);
end

model Replication()
  // model units - substance: substance, time: time_unit, volume: volume, area: area, length: length, extent: extent

  // Compartments:
  compartment default = 1;

  // Species:
  species unfinished_okazaki_fragment in default = 0;
  species okazaki_fragment in default = 0; okazaki_fragment is "lagging ssDNA with an Okazaki fragment";
  species lagDsDNA in default = 0; lagDsDNA is "lagDsDNA bp";
  species DnaA_ATP_complex in default = 0; DnaA_ATP_complex is "DnaA-ATP complex";
  species leadSsDNA in default = 0; leadSsDNA is "leading ssDNA";
  species leadDsDNA in default = 0; leadDsDNA is "leading dsDNA bp with a break";
  species Complete_DNA in default = 0;
  species dsDNA in default = 580076;
  species leadSsDNA_SSB in default = 0; leadSsDNA_SSB is "leading ssDNA with SSB bound";
  species lagSsDNA in default = 0; lagSsDNA is "lagging ssDNA";
  species lagSsDNA_SSB in default = 0; lagSsDNA_SSB is "lagging ssDNA with SSB bound";
  species MG_094_HEXAMER in default = 50; MG_094_HEXAMER is "Helicase";
  species DNA_POLYMERASE_CORE_BETA_CLAMP_GAMMA_COMPLEX in default = 0; DNA_POLYMERASE_CORE_BETA_CLAMP_GAMMA_COMPLEX is "DNA polymerase III";
  species MG_250_MONOMER in default = 5; MG_250_MONOMER is "primase";
  species DNA_POLYMERASE_CORE in default = 2; DNA_POLYMERASE_CORE is "core subunit";
  species DNA_POLYMERASE_GAMMA_COMPLEX in default = 1; DNA_POLYMERASE_GAMMA_COMPLEX is "gamma complex";
  species MG_001_DIMER in default = 5; MG_001_DIMER is "beta-clamp";
  species MG_091_TETRAMER in default = 100; MG_091_TETRAMER is "SSB tetramer";
  species MG_091_OCTAMER in default = 50; MG_091_OCTAMER is "SSB octamer";

  // Parameters:
  unwinding_rate = 0;
  Lead_polymerisation_rate = 0;
  okazaki_polymerisation_rate = 100;
  dnaa_atp_complex_creation_rate = 1;
  ssb_transformation_rate = 1;
  ssb_binding_rate = 1;
  okazaki_fragment_length = 1500;
  MG_254_MONOMER = 5; MG_254_MONOMER is "ligase";
  bp_before_polymerization = 100;
  genome_length = 580076;
  Initiation_rate = 1;
  Lag_ligation_rate = 0.04;
  Lead_ligation_rate = 0.04;
  polymerase_complex_creation_rate = 1;
  terminal_lag_ligation_rate = 0.04;
  termination_rate = 1;

  // Reactions:
  r_unwinding: dsDNA => leadSsDNA + lagSsDNA; default*unwinding_rate*MG_094_HEXAMER*my_hill(dsDNA);  // modifiers: MG_094_HEXAMER
  r_polymerisation_lead: leadSsDNA_SSB => leadDsDNA + MG_091_OCTAMER; default*Lead_polymerisation_rate*my_hill(leadSsDNA_SSB)*my_hill(MG_250_MONOMER)*my_hill(DNA_POLYMERASE_CORE_BETA_CLAMP_GAMMA_COMPLEX); r_polymerisation_lead is "leading strand polymerisation";  // modifiers: DNA_POLYMERASE_CORE_BETA_CLAMP_GAMMA_COMPLEX, MG_250_MONOMER
  r_okazaki_creation: lagSsDNA_SSB => unfinished_okazaki_fragment + MG_091_OCTAMER; default*okazaki_polymerisation_rate*my_hill(lagSsDNA_SSB)*my_hill(MG_250_MONOMER)*my_hill(DNA_POLYMERASE_CORE_BETA_CLAMP_GAMMA_COMPLEX); r_okazaki_creation is "creation of an Okazaki fragment";  // modifiers: DNA_POLYMERASE_CORE_BETA_CLAMP_GAMMA_COMPLEX, MG_250_MONOMER
  r_dnaa_atp_complex_creation: => DnaA_ATP_complex; default*dnaa_atp_complex_creation_rate; r_dnaa_atp_complex_creation is "DnaA-ATP complex creation";
  r_polymerase_complex_creation: 2 DNA_POLYMERASE_CORE + DNA_POLYMERASE_GAMMA_COMPLEX + MG_001_DIMER => DNA_POLYMERASE_CORE_BETA_CLAMP_GAMMA_COMPLEX; default*DNA_POLYMERASE_CORE^2*DNA_POLYMERASE_GAMMA_COMPLEX*MG_001_DIMER; r_polymerase_complex_creation is "Polymerase complex creation";
  r_ssb_tetra_octa_conversion: 2 MG_091_TETRAMER -> MG_091_OCTAMER; default*ssb_transformation_rate*MG_091_TETRAMER^2 - MG_091_OCTAMER; r_ssb_tetra_octa_conversion is "SSB tetramer to SSB octamer conversion";
  r_ssb_binding_lead: 2 MG_091_TETRAMER + leadSsDNA => leadSsDNA_SSB; default*ssb_binding_rate*MG_091_TETRAMER^2*leadSsDNA; r_ssb_binding_lead is "SSB binding (leading strand)";
  r_ssb_binding_lag: 2 MG_091_TETRAMER + lagSsDNA => lagSsDNA_SSB; default*ssb_binding_rate*MG_091_TETRAMER^2*lagSsDNA; r_ssb_binding_lag is "SSB binding (lagging strand)";

  // Events:
  e_finish_okazaki_fragment: at ((unfinished_okazaki_fragment >= okazaki_fragment_length) && (MG_254_MONOMER >= 1)): lagDsDNA = lagDsDNA + okazaki_fragment_length, okazaki_fragment = okazaki_fragment + 1, unfinished_okazaki_fragment = unfinished_okazaki_fragment - okazaki_fragment_length;
  e_replication_initiation: at (DnaA_ATP_complex*default >= 1): unwinding_rate = 2, DnaA_ATP_complex = 0, dnaa_atp_complex_creation_rate = 0;
  e_start_polymerisation: at (leadSsDNA*default >= bp_before_polymerization): Lead_polymerisation_rate = 100;
  e_terminate_lead: at ((leadDsDNA*default >= genome_length - 1) && (MG_254_MONOMER >= 1)): Complete_DNA = Complete_DNA + 1, leadDsDNA = 0;
  e_terminate_lag: at ((lagDsDNA*default >= genome_length - okazaki_fragment_length) && (MG_254_MONOMER >= 1)): Complete_DNA = Complete_DNA + 1, lagDsDNA = 0;

  // Unit definitions:
  unit volume = litre;
  unit time_unit = second;
  unit substance = item;
  unit extent = item;
  unit length = metre;
  unit area = dimensionless;
end
