// SBML level 2 version 4

function Rate_Law_1_substrate(s, k)
  s*k;
end

function Rate_Law_1_substrate_2_modifier(k, s, m, m2)
  k*s*m*m2;
end

function Rate_Law_1_substrate_1_modifier(k, s, m)
  k*s*m;
end

function Rate_Law_3_substrate(k, s1, s2, s3)
  k*s1*s2*s3;
end

function Rate_Law_1_substrate_3_modifier(k, s1, m, m2, m3)
  k*s1*m3*m*m2;
end

function Rate_Law_2_substrate(k, s1, s2)
  k*s1*s2;
end

model Replication()

  // Compartments:
  compartment default = 1;

  // Species:
  species dsDNA in default = 0;
  species MG_094_HEXAMER in default = 50; MG_094_HEXAMER is "Helicase";
  species leadSsDNA in default = 0; leadSsDNA is "leading ssDNA";
  species lagSsDNA in default = 0; lagSsDNA is "lagging ssDNA";
  species MG_254_MONOMER in default = 50; MG_254_MONOMER is "ligase";
  species DNA_POLYMERASE_CORE in default = 50; DNA_POLYMERASE_CORE is "core subunit";
  species MG_001_DIMER in default = 50; MG_001_DIMER is "beta-clamp";
  species MG_250_MONOMER in default = 50; MG_250_MONOMER is "primase";
  species DNA_POLYMERASE_GAMMA_COMPLEX in default = 50; DNA_POLYMERASE_GAMMA_COMPLEX is "gamma complex";
  species leadDsDNA in default = 0; leadDsDNA is "dsDNA with a break";
  species lagDsDNA in default = 0;
  species okazaki_fragment in default = 0; okazaki_fragment is "lagging ssDNA with an Okazaki fragment";
  species MG_091_TETRAMER in default = 50; MG_091_TETRAMER is "SSB tetramer";
  species lagSsDNA_MG_091_OCTAMER in default = 0; lagSsDNA_MG_091_OCTAMER is "lagging ssDNA with SSBP bound";
  species MG_091_OCTAMER in default = 50; MG_091_OCTAMER is "SSB octamer";
  species DNA_POLYMERASE_CORE_BETA_CLAMP_GAMMA_COMPLEX in default = 0; DNA_POLYMERASE_CORE_BETA_CLAMP_GAMMA_COMPLEX is "DNA polymerase III";
  species DnaA_ATP_complex in default = 1; DnaA_ATP_complex is "DnaA-ATP complex";
  species Complete_DNA in default = 1;

  // Parameters:
  Initiation_rate = 500;
  Lag_ligation_rate = 1;
  Lead_ligation_rate = 1;
  Lead_polymerisation_rate = 10;
  okazaki_polymerisation_rate = 1;
  polymerase_complex_creation_rate = 1;
  ssb_binding_rate = 1;
  SSB_transformation_rate = 1;
  terminal_lag_ligation_rate = 1;
  termination_rate = 1;
  unwinding_rate = 1;

  // Reactions:
  unwinding: dsDNA => leadSsDNA + lagSsDNA; default*Rate_Law_1_substrate_1_modifier(unwinding_rate, dsDNA, MG_094_HEXAMER);  // modifiers: MG_094_HEXAMER
  terminal_lag_ligation: 500 lagDsDNA => Complete_DNA; default*Rate_Law_1_substrate_1_modifier(terminal_lag_ligation_rate, lagDsDNA, MG_254_MONOMER);  // modifiers: MG_254_MONOMER
  lead_ligation: 500 leadDsDNA => Complete_DNA; default*Rate_Law_1_substrate_1_modifier(Lead_ligation_rate, leadDsDNA, MG_254_MONOMER);  // modifiers: MG_254_MONOMER
  lead_polymerisation: 10 leadSsDNA => 10 leadDsDNA; default*Rate_Law_1_substrate_2_modifier(Lead_polymerisation_rate, leadSsDNA, MG_250_MONOMER, DNA_POLYMERASE_CORE_BETA_CLAMP_GAMMA_COMPLEX);  // modifiers: MG_250_MONOMER, DNA_POLYMERASE_CORE_BETA_CLAMP_GAMMA_COMPLEX
  okazaki_creation: lagSsDNA_MG_091_OCTAMER => okazaki_fragment + MG_091_OCTAMER; default*Rate_Law_1_substrate_3_modifier(okazaki_polymerisation_rate, lagSsDNA_MG_091_OCTAMER, MG_250_MONOMER, DNA_POLYMERASE_CORE_BETA_CLAMP_GAMMA_COMPLEX, MG_001_DIMER);  // modifiers: MG_250_MONOMER, DNA_POLYMERASE_CORE_BETA_CLAMP_GAMMA_COMPLEX, MG_001_DIMER
  ssb_binding: 2 lagSsDNA + MG_091_OCTAMER => lagSsDNA_MG_091_OCTAMER; default*Rate_Law_2_substrate(ssb_binding_rate, lagSsDNA, MG_091_OCTAMER);
  lag_ligation: 2 okazaki_fragment => 4 lagDsDNA; default*Rate_Law_1_substrate_1_modifier(Lag_ligation_rate, okazaki_fragment, MG_254_MONOMER);  // modifiers: MG_254_MONOMER
  polymerase_complex_creation: DNA_POLYMERASE_CORE + DNA_POLYMERASE_GAMMA_COMPLEX + MG_001_DIMER => DNA_POLYMERASE_CORE_BETA_CLAMP_GAMMA_COMPLEX; default*Rate_Law_3_substrate(polymerase_complex_creation_rate, DNA_POLYMERASE_CORE, DNA_POLYMERASE_GAMMA_COMPLEX, MG_001_DIMER);
  SSB_transformation: MG_091_OCTAMER -> MG_091_TETRAMER; default*(SSB_transformation_rate*MG_091_OCTAMER - SSB_transformation_rate*MG_091_TETRAMER);
  initiation: Complete_DNA + DnaA_ATP_complex => 500 dsDNA; default*Rate_Law_2_substrate(Initiation_rate, Complete_DNA, DnaA_ATP_complex);
  termination: 2 Complete_DNA => ; default*Rate_Law_1_substrate(Complete_DNA, termination_rate);

  // Unit definitions:
  unit volume = dimensionless;
  unit time = dimensionless;
  unit substance = item;
end
