// SBML level 3 version 1

model chromosomeSegregation()
  // Wholecell 2015 - Segregation
  // isInstanceOf mamo:MAMO_Cell_Cycle_Model
  // isInstanceOf mamo:MAMO_0000053
  // isDerivedFrom doi:10.1016/j.cell.2012.05.044
  // hasTaxon taxonomy:243273
  // GO:0005623

  // Compartments:
  compartment default_compartment = 1;

  // Species:
  species MG_470_MONOMER in default_compartment = 1; MG_470_MONOMER is "CobQ";
  species MG_221_OCTAMER in default_compartment = 1; MG_221_OCTAMER is "mraZ";
  species MG_387_MONOMER in default_compartment = 1; MG_387_MONOMER is "Era";
  species MG_384_MONOMER in default_compartment = 1; MG_384_MONOMER is "Obg";
  species MG_203_204_TETRAMER in default_compartment = 1; MG_203_204_TETRAMER is "topoisomerase";
  species GTP in default_compartment = 500;
  species GDP in default_compartment = 500;
  species H in default_compartment = 500;
  species H2O in default_compartment = 4;
  species P in default_compartment = 500;
  species dummy in default_compartment = 0;

  // Parameters:
  ChromosomeIsSegregated = 0;
  Chromosome_polymerizedRegions = 232304;
  Chromosome_supercoiled = 4;
  Chromosome_nCompartments = 4;
  Chromosome_sequenceLen = 58076;
  gtpCost = 1;

  // Reactions:
  _J0: => dummy; 1;

  // Events:
  TriggerChromosomeSegregation: at ((dummy > 0) && (H2O >= gtpCost) && (Chromosome_polymerizedRegions == Chromosome_nCompartments*Chromosome_sequenceLen) && (Chromosome_supercoiled == Chromosome_nCompartments) && (MG_470_MONOMER >= 1) && (MG_221_OCTAMER >= 1) && (MG_387_MONOMER >= 1) && (MG_384_MONOMER >= 1) && (MG_203_204_TETRAMER >= 1) && (GTP >= gtpCost) && (H2O >= gtpCost)), t0=false: ChromosomeIsSegregated = 1, H = H + gtpCost, P = P + gtpCost, GDP = GDP + gtpCost, GTP = GTP - gtpCost, H2O = H2O - gtpCost;
end
